*Heading
** Job name: cylinder Model name: Model-1
** Generated by: Abaqus/CAE 2021
*Preprint, echo=NO, model=NO, history=NO, contact=NO
**
** PARTS
**
*Part, name=cylinder
*Node
      1,   47.4712677,          30.,   69.6649246
      2,   51.8426552,          30.,   68.6671829
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*Element, type=C3D8
    1,   472,   338,    19,   538,  2100,  1966,  1647,  2166
    2,    18,   491,   421,   336,  1646,  2119,  2049,  1964
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*Nset, nset=contact
     1,     2,     3,     4,     5,     6
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*Elset, elset=contact
     1,     2,     3,     4,     5,     6
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*Nset, nset=cylinder, generate
     1,  66748,      1
*Elset, elset=cylinder, generate
     1,  62560,      1
*Elset, elset=_contact_S4, internal
     1,     4,     5,     6,     7,     9
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*Elset, elset=_contact_S6, internal
     2,     8,    34,    42,    44,    49
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*Elset, elset=_contact_S5, internal
   250,   564,  1814,  2128,  3378,  3692
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*Elset, elset=_contact_S3, internal, generate
   552,  61548,   1564
*Elset, elset=_contact_S2, internal, generate
 60997,  62560,      1
*Elset, elset=_contact_S1, internal, generate
    1,  1564,     1
*Surface, type=ELEMENT, name=contact
_contact_S4, S4
_contact_S6, S6
_contact_S2, S2
_contact_S5, S5
_contact_S3, S3
_contact_S1, S1
** Section: Section-1
*Solid Section, elset=cylinder, material=Material-1
,
*End Part
**
**
** ASSEMBLY
**
*Assembly, name=Assembly
**
*Instance, name=cylinder-1, part=cylinder
*End Instance
**
*End Assembly
**
** MATERIALS
**
*Material, name=Material-1
*Hyperelastic, neo hooke
 0.24, 0.4
