*Heading
** Job name: rec Model name: Model-1
** Generated by: Abaqus/CAE 2021
*Preprint, echo=NO, model=NO, history=NO, contact=NO
**
** PARTS
**
*Part, name=block
*Node
      1,          10.,         -10.,         110.
      2,          10.,         -10.,         108.
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*Element, type=C3D8
   1,  122,  123,  134,  133,    1,    2,   13,   12
   2,  123,  124,  135,  134,    2,    3,   14,   13
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*Nset, nset=Set-1, generate
    1,  1331,     1
*Elset, elset=Set-1, generate
    1,  1000,     1
*Elset, elset=_contact_S1, internal, generate
  901,  1000,     1
*Elset, elset=_contact_S4, internal, generate
   10,  1000,    10
*Elset, elset=_contact_S6, internal, generate
   1,  991,   10
*Elset, elset=_contact_S3, internal
   1,   2,   3,   4,   5,   6
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*Elset, elset=_contact_S5, internal
   91,   92,   93,   94,   95,   96
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*Elset, elset=_contact_S2, internal, generate
   1,  100,    1
*Surface, type=ELEMENT, name=contact
_contact_S1, S1
_contact_S4, S4
_contact_S6, S6
_contact_S2, S2
_contact_S3, S3
_contact_S5, S5
** Section: Section-1
*Solid Section, elset=Set-1, material=Material-1
,
*End Part
**
**
** ASSEMBLY
**
*Assembly, name=Assembly
**
*Instance, name=rec-1, part=block
*End Instance
**
*End Assembly
**
** MATERIALS
**
*Material, name=Material-1
*Hyperelastic, neo hooke
1.,1.
** ----------------------------------------------------------------
**
** STEP: Step-1
**
*Step, name=Step-1, nlgeom=YES
*Static
1., 1., 1e-05, 1.
**
** OUTPUT REQUESTS
**
*Restart, write, frequency=0
**
** FIELD OUTPUT: F-Output-1
**
*Output, field, variable=PRESELECT
**
** HISTORY OUTPUT: H-Output-1
**
*Output, history, variable=PRESELECT
*End Step
