*Heading
** Job name: obj Model name: obj
** Generated by: Abaqus/CAE 2021
*Preprint, echo=NO, model=NO, history=NO, contact=NO
**
** PARTS
**
*Part, name=obj
*Node
      1,          45.,          30.,           0.
      2,          45.,          30.,          80.
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*Element, type=C3D4
    1, 2520, 2521, 2522, 2523
    2, 2520, 2524, 2525, 2526
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*Nset, nset=cylinder, generate
    1,  9367,     1
*Elset, elset=cylinder, generate
     1,  48652,      1
*Nset, nset=contact, generate
    1,  2519,     1
*Elset, elset=contact
    24,    35,    36,    64,    68,    71
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*Elset, elset=_contact_S1, internal
    35,    68,   268,   340,   372,   435
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*Elset, elset=_contact_S3, internal
    24,    36,    71,    84,   139,   156
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*Elset, elset=_contact_S2, internal
    64,  1247,  1682,  1687,  1743,  1948
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*Elset, elset=_contact_S4, internal
   194,   227,   354,   355,   639,   726
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*Surface, type=ELEMENT, name=contact
_contact_S1, S1
_contact_S3, S3
_contact_S2, S2
_contact_S4, S4
** Section: Section-1
*Solid Section, elset=cylinder, material=Material-1
,
*End Part
**
**
** ASSEMBLY
**
*Assembly, name=Assembly
**
*Instance, name=obj-1, part=obj
*End Instance
**
*End Assembly
**
** MATERIALS
**
*Material, name=Material-1
*Hyperelastic, neo hooke
 0.24, 0.4
