*Heading
** Job name: rec Model name: Model-1
** Generated by: Abaqus/CAE 2021
*Preprint, echo=NO, model=NO, history=NO, contact=NO
**
** PARTS
**
*Part, name=rec
*Node
      1,         12.5,         -25.,         250.
      2,         12.5,          25.,         250.
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*Element, type=C3D4
    1, 11825, 11826,  5449, 11827
    2, 11825, 11828, 11829,  5448
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*Nset, nset=Set-2, generate
     1,  17668,      1
*Elset, elset=Set-2, generate
     1,  69401,      1
*Nset, nset=contact
    1,    2,    3,    4,    9,   10
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*Elset, elset=contact
    83,   163,   391,   396,   465,   510
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*Elset, elset=_contact_S2, internal
   247,   718,   862,   879,  1015,  2333
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*Elset, elset=_contact_S3, internal
    83,   396,   465,   529,   686,   752
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*Elset, elset=_contact_S1, internal
   163,   391,   510,   708,   717,  1014
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*Elset, elset=_contact_S4, internal
   807,  1666,  2273,  2417,  2623,  2934
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*Surface, type=ELEMENT, name=contact
_contact_S2, S2
_contact_S3, S3
_contact_S4, S4
_contact_S1, S1
** Section: Section-1
*Solid Section, elset=Set-2, material=Material-1
,
*End Part
**
**
** ASSEMBLY
**
*Assembly, name=Assembly
**
*Instance, name=Part-1-1, part=rec
*End Instance
**
*End Assembly
**
** MATERIALS
**
*Material, name=Material-1
*Density
1.,
*Hyperelastic, neo hooke
1.,1.
